Simulations Spacing_GUALTIERI_RE_DEMO__GUALTIERI_LOAM_DEMO_001__gualtieri_5y_three_species: Version=168
  DataStore
  Simulation GUALTIERI_RE_DEMO__GUALTIERI_LOAM_DEMO_001__gualtieri_5y_three_species
    Clock: Start=2020-01-01; End=2024-12-31
    Summary
    Weather
      FileName=C:/Users/maurizio.bagnara/Documents/spacing-main/apsim/rSpacing_runs/gualtieri_rotation_2020_2024_20261109_183612/weather\GUALTIERI_RE_DEMO_2020_2024.met
    SoilArbitrator
    MicroClimate: a_interception=0; b_interception=1; c_interception=0; d_interception=0; SoilHeatFluxFraction=0.4; NightInterceptionFraction=0.5; ReferenceHeight=2
    Zone Field: Area=1
      Soil: SoilType=Franco limoso dimostrativo
        DataSource=Synthetic demo profile generated in R; not observed soil data
        Physical
          Thickness  BD    AirDry  LL15  DUL   SAT
          150        1.28  0.07    0.14  0.31  0.46
          150        1.33  0.075   0.15  0.32  0.45
          300        1.39  0.08    0.16  0.33  0.44
          300        1.43  0.08    0.16  0.32  0.43
          300        1.46  0.08    0.16  0.31  0.42
          300        1.49  0.075   0.15  0.3   0.41
          SoilCrop WheatSoil: LL=[0.14, 0.15, 0.16, 0.16, 0.16, 0.15]; KL=[0.07, 0.064, 0.058, 0.052, 0.046, 0.04]; XF=[1, 1, 1, 1, 1, 1]
          SoilCrop MaizeSoil: LL=[0.14, 0.15, 0.16, 0.16, 0.16, 0.15]; KL=[0.07, 0.064, 0.058, 0.052, 0.046, 0.04]; XF=[1, 1, 1, 1, 1, 1]
          SoilCrop SoybeanSoil: LL=[0.14, 0.15, 0.16, 0.16, 0.16, 0.15]; KL=[0.07, 0.064, 0.058, 0.052, 0.046, 0.04]; XF=[1, 1, 1, 1, 1, 1]
        WaterBalance SoilWater: SummerDate=1-Jun; SummerU=6; SummerCona=3.5; WinterDate=1-Oct; WinterU=2; WinterCona=2.5; DiffusConst=40; DiffusSlope=16; Salb=0.13; CN2Bare=73; CNRed=20; CNCov=0.8; PSIDul=-100; Thickness=[150, 150, 300, 300, 300, 300]; SWCON=[0.3, 0.3, 0.3, 0.3, 0.3, 0.3]
        Nutrient
        Organic: FOMCNRatio=50
          Thickness  Carbon  SoilCNRatio  FBiom  FInert  FOM
          150        1.45    12.5         0.05   0.45    260
          150        1.15    12.5         0.02   0.6     192.6127
          300        0.75    12.5         0.01   0.9     78.3105
          300        0.48    12.5         0.01   0.9     42.9777
          300        0.32    12.5         0.01   0.9     23.5867
          300        0.24    12.5         0.01   0.9     12.9446
        Chemical: Thickness=[150, 150, 300, 300, 300, 300]; PH=[7.2, 7.3, 7.4, 7.5, 7.6, 7.7]; PHUnits=Water
        Water: Thickness=[150, 150, 300, 300, 300, 300]; InitialValues=[0.28, 0.29, 0.3, 0.29, 0.28, 0.27]; FilledFromTop=false
        CERESSoilTemperature Temperature
        Solute NO3: Thickness=[150, 150, 300, 300, 300, 300]; InitialValues=[18, 12, 8, 5, 3.5, 2.5]; InitialValuesUnits=ppm; WaterTableConcentration=0; D0=0
        Solute NH4: Thickness=[150, 150, 300, 300, 300, 300]; InitialValues=[2, 1.5, 1, 0.7, 0.5, 0.4]; InitialValuesUnits=ppm; WaterTableConcentration=0; D0=0
        Solute Urea: Thickness=[150, 150, 300, 300, 300, 300]; InitialValues=[0, 0, 0, 0, 0, 0]; InitialValuesUnits=kg/ha; WaterTableConcentration=0; D0=0
      SurfaceOrganicMatter: InitialResidueName=wheat_stubble; InitialResidueType=wheat; InitialResidueMass=500; InitialStandingFraction=0; InitialCPR=0; InitialCNR=80
      Irrigation
      Fertiliser
      Plant Wheat
      Manager Sow_Wheat
        StartDate = 10-oct
        EndDate = 20-nov
        CultivarName = Hartog
        SowingDepth = 35
        RowSpacing = 180
        Population = 180.0
```csharp
using APSIM.Shared.Utilities;
using Models.PMF;
using Models.Core;
using System;

namespace Models
{
    [Serializable]
    public class Script : Model
    {
        [Link] private Clock Clock;
        [Link] private Summary Summary;
        [Link(ByName = true)] private Plant Wheat;

        [Description("Start of sowing window (d-mmm)")]
        public string StartDate { get; set; }

        [Description("End of sowing window (d-mmm)")]
        public string EndDate { get; set; }

        [Description("Cultivar name")]
        public string CultivarName { get; set; }

        [Description("Sowing depth (mm)")]
        public double SowingDepth { get; set; }

        [Description("Row spacing (mm)")]
        public double RowSpacing { get; set; }

        [Description("Sowing population (/m2)")]
        public double Population { get; set; }

        [EventSubscribe("DoManagement")]
        private void OnDoManagement(object sender, EventArgs e)
        {
            if (DateUtilities.WithinDates(StartDate, Clock.Today, EndDate) && !Wheat.IsAlive)
            {
                Summary.WriteMessage(this, $"Sowing Wheat on {Clock.Today:dd-MMM-yyyy} cultivar={CultivarName} pop={Population}", MessageType.Diagnostic);
                Wheat.Sow(cultivar: CultivarName, population: Population,
                         depth: SowingDepth, rowSpacing: RowSpacing);
            }
        }
    }
}
```
      Manager Harvest_Wheat
```csharp
using Models.Soils;
using System;
using System.Linq;
using Models.Core;
using Models.PMF;

namespace Models
{
    [Serializable]
    public class Script : Model
    {
        [Link]
        private Clock clock;

        [Link]
        private IPlant crop;

        [EventSubscribe("EndOfDay")]
        private void OnDoCalculations(object sender, EventArgs e)
        {
            if (crop.IsReadyForHarvesting)
            {
                crop.Harvest();
                crop.EndCrop();
            }
        }
    }
}
```
      Manager Fertilise_Wheat_D100_1
        DAS = 100
        Amount = 70.0
        FertType = UreaN
```csharp
using Models.Core;
using System;

namespace Models
{
    [Serializable]
    public class Script : Model
    {
        [Link] private Clock Clock;
        [Link] private Fertiliser Fertiliser;
        [Link] private Summary Summary;
        [Link(ByName = true)] private Models.PMF.Plant Wheat;

        [Description("Days after sowing")]
        public int DAS { get; set; }

        [Description("Amount of N (kg/ha)")]
        public double Amount { get; set; }

        [Description("Fertiliser type")]
        public string FertType { get; set; }

        private DateTime _sowDate = DateTime.MinValue;
        private bool _applied = false;

        [EventSubscribe("Sowing")]
        private void OnSowing(object sender, EventArgs e)
        {
            if (sender == Wheat)
            {
                _sowDate = Clock.Today;
                _applied = false;
            }
        }

        [EventSubscribe("DoManagement")]
        private void OnDoManagement(object sender, EventArgs e)
        {
            if (!_applied && _sowDate != DateTime.MinValue && Wheat.IsAlive)
            {
                int das = (Clock.Today - _sowDate).Days;
                if (das >= DAS && Amount > 0)
                {
                    Fertiliser.Apply(amount: Amount, type: FertType);
                    Summary.WriteMessage(this, $"N copertura Wheat: {Amount:F1} kg N/ha a {das} DAS", MessageType.Diagnostic);
                    _applied = true;
                }
            }
            // Reset quando la coltura è morta/raccolta
            if (!Wheat.IsAlive) { _sowDate = DateTime.MinValue; _applied = false; }
        }
    }
}
```
      Manager Fertilise_Wheat_D145_2
        DAS = 145
        Amount = 50.0
        FertType = UreaN
        script: same as in GUALTIERI_RE_DEMO__GUALTIERI_LOAM_DEMO_001__gualtieri_5y_three_species.Field.Fertilise_Wheat_D100_1
      Manager Irrigate_Wheat
        Threshold = 0.35
        Target = 0.70
        MaxMm = 25.0
        WindowStart = 1-mar
        WindowEnd = 31-may
```csharp
using Models.Core;
using Models.Soils;
using Models.Interfaces;
using System;
using System.Linq;
using APSIM.Shared.Utilities;

namespace Models
{
    [Serializable]
    public class Script : Model
    {
        [Link] private Clock Clock;
        [Link] private Irrigation Irrigation;
        [Link] private Summary Summary;
        [Link] private Zone Zone;
        [Link(ByName = true)] private Models.PMF.Plant Wheat;

        [Description("Soglia PAW/PAWC sotto cui irrigare (0-1)")]
        public double Threshold { get; set; }

        [Description("Obiettivo di ricarica PAW/PAWC (0-1)")]
        public double Target { get; set; }

        [Description("Dose massima per turno (mm)")]
        public double MaxMm { get; set; }

        [Description("Inizio finestra irrigua (d-mmm)")]
        public string WindowStart { get; set; }

        [Description("Fine finestra irrigua (d-mmm)")]
        public string WindowEnd { get; set; }

        [EventSubscribe("DoManagement")]
        private void OnDoManagement(object sender, EventArgs e)
        {
            if (!Wheat.IsAlive) return;
            if (!DateUtilities.WithinDates(WindowStart, Clock.Today, WindowEnd)) return;

            // Calcola PAW e PAWC dal profilo suolo corrente
            var physical = Zone.FindDescendant<IPhysical>();
            var soilWater = Zone.FindDescendant<ISoilWater>();
            if (physical == null || soilWater == null) return;

            double[] sw        = soilWater.SW;         // vol. water content
            double[] thickness = soilWater.Thickness;   // ISoilWater espone Thickness
            double[] dul       = physical.DUL;          // IPhysical espone DUL e LL15
            double[] ll15      = physical.LL15;

            double pawc = 0, paw = 0;
            int nLayers = Math.Min(sw.Length, Math.Min(dul.Length, Math.Min(ll15.Length, thickness.Length)));
            for (int i = 0; i < nLayers; i++)
            {
                double lPawc = thickness[i] * Math.Max(0, dul[i] - ll15[i]);
                double lPaw  = thickness[i] * Math.Max(0, Math.Min(sw[i], dul[i]) - ll15[i]);
                pawc += lPawc;
                paw  += lPaw;
            }

            if (pawc <= 0) return;
            double fraction = paw / pawc;

            if (fraction < Threshold)
            {
                double deficit = (Target - fraction) * pawc;
                double amount  = Math.Min(Math.Max(0, deficit), MaxMm);
                if (amount >= 1.0)
                {
                    Irrigation.Apply(amount);
                    Summary.WriteMessage(this, $"Irrigazione Wheat: {amount:F1} mm (PAW {fraction:P0} → target {Target:P0})", MessageType.Diagnostic);
                }
            }
        }
    }
}
```
      Plant Maize
      Manager Sow_Maize
        StartDate = 1-apr
        EndDate = 10-may
        CultivarName = B_110
        SowingDepth = 50
        RowSpacing = 750
        Population = 7.5
```csharp
using APSIM.Shared.Utilities;
using Models.PMF;
using Models.Core;
using System;

namespace Models
{
    [Serializable]
    public class Script : Model
    {
        [Link] private Clock Clock;
        [Link] private Summary Summary;
        [Link(ByName = true)] private Plant Maize;

        [Description("Start of sowing window (d-mmm)")]
        public string StartDate { get; set; }

        [Description("End of sowing window (d-mmm)")]
        public string EndDate { get; set; }

        [Description("Cultivar name")]
        public string CultivarName { get; set; }

        [Description("Sowing depth (mm)")]
        public double SowingDepth { get; set; }

        [Description("Row spacing (mm)")]
        public double RowSpacing { get; set; }

        [Description("Sowing population (/m2)")]
        public double Population { get; set; }

        [EventSubscribe("DoManagement")]
        private void OnDoManagement(object sender, EventArgs e)
        {
            if (DateUtilities.WithinDates(StartDate, Clock.Today, EndDate) && !Maize.IsAlive)
            {
                Summary.WriteMessage(this, $"Sowing Maize on {Clock.Today:dd-MMM-yyyy} cultivar={CultivarName} pop={Population}", MessageType.Diagnostic);
                Maize.Sow(cultivar: CultivarName, population: Population,
                         depth: SowingDepth, rowSpacing: RowSpacing);
            }
        }
    }
}
```
      Manager Harvest_Maize: same as GUALTIERI_RE_DEMO__GUALTIERI_LOAM_DEMO_001__gualtieri_5y_three_species.Field.Harvest_Wheat
      Manager Fertilise_Maize_D35_1
        DAS = 35
        Amount = 100.0
        FertType = UreaN
```csharp
using Models.Core;
using System;

namespace Models
{
    [Serializable]
    public class Script : Model
    {
        [Link] private Clock Clock;
        [Link] private Fertiliser Fertiliser;
        [Link] private Summary Summary;
        [Link(ByName = true)] private Models.PMF.Plant Maize;

        [Description("Days after sowing")]
        public int DAS { get; set; }

        [Description("Amount of N (kg/ha)")]
        public double Amount { get; set; }

        [Description("Fertiliser type")]
        public string FertType { get; set; }

        private DateTime _sowDate = DateTime.MinValue;
        private bool _applied = false;

        [EventSubscribe("Sowing")]
        private void OnSowing(object sender, EventArgs e)
        {
            if (sender == Maize)
            {
                _sowDate = Clock.Today;
                _applied = false;
            }
        }

        [EventSubscribe("DoManagement")]
        private void OnDoManagement(object sender, EventArgs e)
        {
            if (!_applied && _sowDate != DateTime.MinValue && Maize.IsAlive)
            {
                int das = (Clock.Today - _sowDate).Days;
                if (das >= DAS && Amount > 0)
                {
                    Fertiliser.Apply(amount: Amount, type: FertType);
                    Summary.WriteMessage(this, $"N copertura Maize: {Amount:F1} kg N/ha a {das} DAS", MessageType.Diagnostic);
                    _applied = true;
                }
            }
            // Reset quando la coltura è morta/raccolta
            if (!Maize.IsAlive) { _sowDate = DateTime.MinValue; _applied = false; }
        }
    }
}
```
      Manager Fertilise_Maize_D60_2
        DAS = 60
        Amount = 50.0
        FertType = UreaN
        script: same as in GUALTIERI_RE_DEMO__GUALTIERI_LOAM_DEMO_001__gualtieri_5y_three_species.Field.Fertilise_Maize_D35_1
      Manager Irrigate_Maize
        Threshold = 0.50
        Target = 0.85
        MaxMm = 35.0
        WindowStart = 1-jun
        WindowEnd = 31-aug
```csharp
using Models.Core;
using Models.Soils;
using Models.Interfaces;
using System;
using System.Linq;
using APSIM.Shared.Utilities;

namespace Models
{
    [Serializable]
    public class Script : Model
    {
        [Link] private Clock Clock;
        [Link] private Irrigation Irrigation;
        [Link] private Summary Summary;
        [Link] private Zone Zone;
        [Link(ByName = true)] private Models.PMF.Plant Maize;

        [Description("Soglia PAW/PAWC sotto cui irrigare (0-1)")]
        public double Threshold { get; set; }

        [Description("Obiettivo di ricarica PAW/PAWC (0-1)")]
        public double Target { get; set; }

        [Description("Dose massima per turno (mm)")]
        public double MaxMm { get; set; }

        [Description("Inizio finestra irrigua (d-mmm)")]
        public string WindowStart { get; set; }

        [Description("Fine finestra irrigua (d-mmm)")]
        public string WindowEnd { get; set; }

        [EventSubscribe("DoManagement")]
        private void OnDoManagement(object sender, EventArgs e)
        {
            if (!Maize.IsAlive) return;
            if (!DateUtilities.WithinDates(WindowStart, Clock.Today, WindowEnd)) return;

            // Calcola PAW e PAWC dal profilo suolo corrente
            var physical = Zone.FindDescendant<IPhysical>();
            var soilWater = Zone.FindDescendant<ISoilWater>();
            if (physical == null || soilWater == null) return;

            double[] sw        = soilWater.SW;         // vol. water content
            double[] thickness = soilWater.Thickness;   // ISoilWater espone Thickness
            double[] dul       = physical.DUL;          // IPhysical espone DUL e LL15
            double[] ll15      = physical.LL15;

            double pawc = 0, paw = 0;
            int nLayers = Math.Min(sw.Length, Math.Min(dul.Length, Math.Min(ll15.Length, thickness.Length)));
            for (int i = 0; i < nLayers; i++)
            {
                double lPawc = thickness[i] * Math.Max(0, dul[i] - ll15[i]);
                double lPaw  = thickness[i] * Math.Max(0, Math.Min(sw[i], dul[i]) - ll15[i]);
                pawc += lPawc;
                paw  += lPaw;
            }

            if (pawc <= 0) return;
            double fraction = paw / pawc;

            if (fraction < Threshold)
            {
                double deficit = (Target - fraction) * pawc;
                double amount  = Math.Min(Math.Max(0, deficit), MaxMm);
                if (amount >= 1.0)
                {
                    Irrigation.Apply(amount);
                    Summary.WriteMessage(this, $"Irrigazione Maize: {amount:F1} mm (PAW {fraction:P0} → target {Target:P0})", MessageType.Diagnostic);
                }
            }
        }
    }
}
```
      Plant Soybean
      Manager Sow_Soybean
        StartDate = 1-may
        EndDate = 15-jun
        CultivarName = Generic_MG1
        SowingDepth = 35
        RowSpacing = 450
        Population = 35.0
```csharp
using APSIM.Shared.Utilities;
using Models.PMF;
using Models.Core;
using System;

namespace Models
{
    [Serializable]
    public class Script : Model
    {
        [Link] private Clock Clock;
        [Link] private Summary Summary;
        [Link(ByName = true)] private Plant Soybean;

        [Description("Start of sowing window (d-mmm)")]
        public string StartDate { get; set; }

        [Description("End of sowing window (d-mmm)")]
        public string EndDate { get; set; }

        [Description("Cultivar name")]
        public string CultivarName { get; set; }

        [Description("Sowing depth (mm)")]
        public double SowingDepth { get; set; }

        [Description("Row spacing (mm)")]
        public double RowSpacing { get; set; }

        [Description("Sowing population (/m2)")]
        public double Population { get; set; }

        [EventSubscribe("DoManagement")]
        private void OnDoManagement(object sender, EventArgs e)
        {
            if (DateUtilities.WithinDates(StartDate, Clock.Today, EndDate) && !Soybean.IsAlive)
            {
                Summary.WriteMessage(this, $"Sowing Soybean on {Clock.Today:dd-MMM-yyyy} cultivar={CultivarName} pop={Population}", MessageType.Diagnostic);
                Soybean.Sow(cultivar: CultivarName, population: Population,
                         depth: SowingDepth, rowSpacing: RowSpacing);
            }
        }
    }
}
```
      Manager Harvest_Soybean: same as GUALTIERI_RE_DEMO__GUALTIERI_LOAM_DEMO_001__gualtieri_5y_three_species.Field.Harvest_Wheat
      Manager Irrigate_Soybean
        Threshold = 0.45
        Target = 0.80
        MaxMm = 30.0
        WindowStart = 15-jun
        WindowEnd = 31-aug
```csharp
using Models.Core;
using Models.Soils;
using Models.Interfaces;
using System;
using System.Linq;
using APSIM.Shared.Utilities;

namespace Models
{
    [Serializable]
    public class Script : Model
    {
        [Link] private Clock Clock;
        [Link] private Irrigation Irrigation;
        [Link] private Summary Summary;
        [Link] private Zone Zone;
        [Link(ByName = true)] private Models.PMF.Plant Soybean;

        [Description("Soglia PAW/PAWC sotto cui irrigare (0-1)")]
        public double Threshold { get; set; }

        [Description("Obiettivo di ricarica PAW/PAWC (0-1)")]
        public double Target { get; set; }

        [Description("Dose massima per turno (mm)")]
        public double MaxMm { get; set; }

        [Description("Inizio finestra irrigua (d-mmm)")]
        public string WindowStart { get; set; }

        [Description("Fine finestra irrigua (d-mmm)")]
        public string WindowEnd { get; set; }

        [EventSubscribe("DoManagement")]
        private void OnDoManagement(object sender, EventArgs e)
        {
            if (!Soybean.IsAlive) return;
            if (!DateUtilities.WithinDates(WindowStart, Clock.Today, WindowEnd)) return;

            // Calcola PAW e PAWC dal profilo suolo corrente
            var physical = Zone.FindDescendant<IPhysical>();
            var soilWater = Zone.FindDescendant<ISoilWater>();
            if (physical == null || soilWater == null) return;

            double[] sw        = soilWater.SW;         // vol. water content
            double[] thickness = soilWater.Thickness;   // ISoilWater espone Thickness
            double[] dul       = physical.DUL;          // IPhysical espone DUL e LL15
            double[] ll15      = physical.LL15;

            double pawc = 0, paw = 0;
            int nLayers = Math.Min(sw.Length, Math.Min(dul.Length, Math.Min(ll15.Length, thickness.Length)));
            for (int i = 0; i < nLayers; i++)
            {
                double lPawc = thickness[i] * Math.Max(0, dul[i] - ll15[i]);
                double lPaw  = thickness[i] * Math.Max(0, Math.Min(sw[i], dul[i]) - ll15[i]);
                pawc += lPawc;
                paw  += lPaw;
            }

            if (pawc <= 0) return;
            double fraction = paw / pawc;

            if (fraction < Threshold)
            {
                double deficit = (Target - fraction) * pawc;
                double amount  = Math.Min(Math.Max(0, deficit), MaxMm);
                if (amount >= 1.0)
                {
                    Irrigation.Apply(amount);
                    Summary.WriteMessage(this, $"Irrigazione Soybean: {amount:F1} mm (PAW {fraction:P0} → target {Target:P0})", MessageType.Diagnostic);
                }
            }
        }
    }
}
```
      Report
        VariableNames:
          [Clock].Today
          [Clock].Today.Year as Year
          [Wheat].Grain.Wt * 10 as Wheat_GrainYield_kgha
          [Wheat].AboveGround.Wt * 10 as Wheat_Biomass_kgha
          [Wheat].Leaf.LAI as Wheat_LAI
          [Maize].Grain.Wt * 10 as Maize_GrainYield_kgha
          [Maize].AboveGround.Wt * 10 as Maize_Biomass_kgha
          [Maize].Leaf.LAI as Maize_LAI
          [Soybean].Grain.Wt * 10 as Soybean_GrainYield_kgha
          [Soybean].AboveGround.Wt * 10 as Soybean_Biomass_kgha
          [Soybean].Leaf.LAI as Soybean_LAI
          sum([NO3].kgha) as SoilNO3_kgha
        EventNames:
          [Wheat].Harvesting
          [Maize].Harvesting
          [Soybean].Harvesting
      Report DailyReport: EventNames=[Clock].EndOfDay
        VariableNames:
          [Clock].Today
          [Clock].Today.Year as Year
          [Clock].Today.DayOfYear as DOY
          [Weather].MaxT as Tx
          [Weather].MinT as Tn
          [Weather].Rain as Rain_mm
          [Weather].Radn as Radn_MJm2
          [Weather].Wind as Wind_ms
          [Weather].VP as VP_hPa
          [MicroClimate].PetTotal as ET0_mm
          [SoilWater].Eo as PotEvapSoil_mm
          [SoilWater].Es as ActEvapSoil_mm
          [SoilWater].Runoff as Runoff_mm
          [SoilWater].Drainage as Perc_mm
          [SoilWater].LeachNO3 as LeachNO3_kgNha
          [Irrigation].IrrigationApplied as Irrig_mm
          [SoilWater].SWmm as SWmm
          sum([SoilWater].SWmm) as SoilSWtot_mm
          [NO3].kgha as NO3_kgha
          [NH4].kgha as NH4_kgha
          sum([Nutrient].MineralisedN) as MinerN_kgNha
          sum([Nutrient].NitrifiedN)   as NitrN_kgNha
          [Nutrient].TotalC as SoilC_kgCha
          [Nutrient].Catm as CO2C_kgCha
          [Nutrient].N2Oatm as N2O_kgNha
          sum([Nutrient].Catm)   as CO2C_total_kgCha
          sum([Nutrient].N2Oatm) as N2O_total_kgNha
          sum([Nutrient].TotalC) as SoilCtot_kgCha
          [Wheat].IsAlive as Wheat_IsAlive
          [Wheat].Phenology.Stage as Wheat_Stage
          [Wheat].Phenology.CurrentStageName as Wheat_StageName
          [Wheat].Leaf.LAI as Wheat_LAI
          [Wheat].AboveGround.Wt * 10 as Wheat_Biomass_kgha
          [Wheat].Root.Wt * 10 as Wheat_RootWt_kgha
          [Wheat].Grain.Wt * 10 as Wheat_GrainWt_kgha
          [Wheat].AboveGround.N * 10 as Wheat_BiomassN_kgNha
          [Maize].IsAlive as Maize_IsAlive
          [Maize].Phenology.Stage as Maize_Stage
          [Maize].Phenology.CurrentStageName as Maize_StageName
          [Maize].Leaf.LAI as Maize_LAI
          [Maize].AboveGround.Wt * 10 as Maize_Biomass_kgha
          [Maize].Root.Wt * 10 as Maize_RootWt_kgha
          [Maize].Grain.Wt * 10 as Maize_GrainWt_kgha
          [Maize].AboveGround.N * 10 as Maize_BiomassN_kgNha
          [Soybean].IsAlive as Soybean_IsAlive
          [Soybean].Phenology.Stage as Soybean_Stage
          [Soybean].Phenology.CurrentStageName as Soybean_StageName
          [Soybean].Leaf.LAI as Soybean_LAI
          [Soybean].AboveGround.Wt * 10 as Soybean_Biomass_kgha
          [Soybean].Root.Wt * 10 as Soybean_RootWt_kgha
          [Soybean].Grain.Wt * 10 as Soybean_GrainWt_kgha
          [Soybean].AboveGround.N * 10 as Soybean_BiomassN_kgNha
